# Calcolo | velocità | angolari
V == V_1 + V_12
V_1 == ω_1×L_1
V_12 == ω_2×L_2
|V1| == |ω_1L_1|
|V_2| == |ω_2L_2|
|V| == v
□ ∠ V == γ
□ ∠ V_1 == α + ω_1/|ω_1|*π/2
□ ∠ V_12 == β + ω_2/|ω_2|*π/2
vcos(γ) == |ω_1L_1|*cos*(α + ω_1/|ω_1|*π/2) + |ω_2L_2|*cos*(β + ω_2/|ω_2|*π/2)
vsin(γ) == |ω_1L_1|*sin*(α + ω_1/|ω_1|*π/2) + |ω_2L_2|*sin*(β + ω_2/|ω_2|*π/2)
y_V == tan(γ)*x
y_V1 == tan(α + π/2)*x
y_V12 == tan(β + π/2)*x + Q_2
P_V2(vcos(γ)*;vsin(γ))
Q_2 == vsin(γ) - vcos(γ)*tan(β + π/2)
x_12 == Q_2/(tan(α + π/2) - tan(β + π/2))
y_12 == tan(α + π/2)*x_12
P_12(x_12;y_12)
ω_1 == dist(O, P_12)/L_1
ω_2 == dist(P_12, P_V2)/L_2
□ ∠ V_1 == atan2(y_12, x_12)
□ ∠ V_2 == atan2(y_V2 - y_12, x_V2 - x_12)
