Vx == -w1*A*sin(α) - w2*B*sin(β)
Vy == w1*A*cos(α) + w2*B*cos(β)
w2(-B*cos(β) + B*sin(β)*cos(α)/sin(α)) == -Vy - Vx*cos(α)/sin(α)
w2 == (-Vy - Vx*cos(α)/sin(α))/(-B*cos(β) + B*sin(β)*cos(α)/sin(α))
w1 == (-Vx - w2*B*sin(β))/(A*sin(α))
Wm + Wr - Wp == dEc/dt
Wp == (1 - n)*(Wm - dEcm/dt)
Wm + Wr - Wm + Wm*n == -dEcm/dt + dEcm/dt*n + dEcm/dt + dEcu/dt
Wmn + Wr == dEcm/dt*n + dEcu/dt
a == (Cmn + Cu)/(Jm_eqn + Ju_eq)
Ecm == 1/2*Jeq*wm^2 == 1/2*Jeq*b^2*tau^2*v^2
Ju_eq2 == J2*τ^2 + M2*τ^2*(Bx2^2 + By2^2)
s == 1/2*a*t^2
t == sqrt(2*s/a)
v == at
t
